# AguaClara Water Treatment Plants
# Automated Design
# Add variable descriptions next to every varible so it is easy to interpret what this all means.
# Design References
# [reference: BasicInputs.xmcd]
# Use BasicClientInputs and ExpertClientInputs when this is run by LabVIEW.
# Use BasicInputs and ExpertInputs to use the program in MathCAD
# Change the reference by
# - right clicking
# - select properties
# - reference tab
# - type in the correct file name
# [reference: ExpertInputs.xmcd]
B_SedPlateFramePipes = 0.3 m
# [reference: DesignAssumptions.xmcd]
# [reference: MathFunctions.xmcd]
# [reference: PipeDatabase.xmcd]
Q_Plant = 200 L/s
# [reference: MinorLossCoefficients.xmcd]
# [reference: FluidsFunctions.xmcd]
# [reference: Sedimentation Tank.xmcd]
# [reference: Floc Hopper - New Design.xmcd]
# [reference: FCM.xmcd]
# [reference: Flocculator 3.xmcd]
# [reference: Rapid Mix.xmcd]
# [reference: EntranceTankDim.xmcd]
# [reference: Materials List.xmcd]
# [reference: ChemStorageCylinders.xmcd]
W_SedBay = 1.06 m
N_SedTanks = 4
W_ExitChannelMin = 0.6096 m
W_SedBay = 1.06 m
N_SedBays = 4
# Sed Tanks and Slopes:
Geom_ExitChannel = 1
N_SedTanks = 4
H_SedBetween = 17.8145 cm  # Distance from the top of the inlet manifold to the bottom of the ledge supporting the lamella frame
L_Sed = 14.8908 m
N_SedBays = 4  # Number of bays of inlet manifolds in each sed tank
# Length of the port through which water exits the inlet manifold
# Width of ferrous cement plates in whice one manifold port is cut
Q_SedBay = 12.5 L/s
# Sedimentation Tank Sludge Drain:
N_SedSludgeOrifices = 148  # per cell
Ti_SludgeDrain = 30 min  # Tank Drain time
W_SedSludge = 18.789 cm  # Width of the sludge channel
B_SedSludgeOrifices = 10 cm  # Distance center to center between drain orifices
H_SedSludge = 9.39452 cm  # Depth of the sludge channel
T_SedSludge = 5 cm
T_SedSludge = 5 cm
# Thickness of the plate topping the sludge channel
# through which drain holes are formed
W_SedDrainCover = 28.789 cm
D_SedSludgeOrifice = 0.009 m  # Diameter of drain orifices
W_SedInletBottom = 0.386055 m
N_SedSludgeOrifices = 148
ND_SedSludgeValve = 6 in
# Sedimentation Tank Dimensions:
Z_SedSludge = 0.143945 m  # Height from 0 of the top of the sludge drain
Z_SedSlopes = 0.76931 m  # Height from 0 of the top of the inlet manifold
W_Sed = 4.24 m  # Total tank wall height
L_Sed = 14.8908 m  # Total tank length
# Inlet Channel:
HW_InletChannel = 0.854508 m  # Width of the drop chimneys connecting channel to sed inlet manifolds
W_InletChannel = 1.24742 m  # length of drop chimmneys
L_Channel = 17.71 m
N_SedInletPipes = 2  # per sed bay
H_InletChannel = 0.954508 m
# Sedimentation Tank Effluent Launder:
N_SedLaunderOrifices = 240  # Number of orifices per launder
Q_SedLaunderOrifices = 5.24699e-5 m^3/s  # More Launder Dimensions
ND_SedLaunder = 12 in
B_SedLaunderOrifices = 0.0998668 m  # Center to center launder spacing
L_SedLaunder = 12.3308 m
# Exit Channel:
D_SedLaunderOrifice = 0.433071 in
W_ExitChannel = 1.01258 m
H_ExitChannel = 0.954508 m
L_ExitChannel = 17.71 m
H_PltWeir = 0.864508 m  # height of the weir carrying water to the distribution tank
HW_ExitChannel = 0.814508 m  # water height in exit channel from 0
# Lamella:
L_SedPlate = 0.522571 m
B_SedPlate = 3.07055 cm  # center to center distance between lamella
S_SedPlate = 2.87055 cm  # spacing between lamella
N_SedPlates = 338  # Number of Sed Plates per Sedimentation Tank Bay.
AN_SedPlate = 60 deg
V_SedC = 10.238 m/day
L_SedActive = 11.984 m
T
V_SedUp = 68.4227 m/day
Z_SedLaunder = 1.7002 m
H_SedPlate = 0.45256 m
H_SedAbove = 0.36301 m  # Height of water needed above the lamella
N_SedPlates = 338
HW_Sed = 1.90128 m
H_Sed = 2.00128 m
Z_Mp = 1.04678 m
H_SedBayDivider = 0.947455 m
# Sedimentation Tank Floc Hopper:
# Length of the hopper cement plate
L_FlocHopperOffset = 0.261286 m  # distance from the edge of the channel to the bottom of the first lamella (collection distance)
# width of the hopper set within each bay
# Flow Controller:
N_Fcm = 19
ID_FcmTube = 4.318 mm
ID_FcmTube = 0.17 in
L_FcmTube = 229.389 cm
Q_FcmTubeMax = 421.053 mL/min
HL_FcmValve = 32.9376 cm
# Flocculator: | Look at Flocculator Positioning arrays
W_FlocChannel = 1.84154 m
# Fill last channel with bafffles from last channel
# Fix port width to be based on energy dissipation in that channel
ED_Floc = 6 mW/kg
# Adjust spacing after the number of baffles per channel is known.
# Check the residence time of the flocculator should be at least 20minutes
HW_FlocEnd = 1.90128 m
X_FlocBaffles = [
    0.613848, 0.613848, 0.613848, 0.854508;
    1.3277, 1.3277, 1.3277, 1.55569;
    2.04154, 2.04154, 2.04154, 2.25687;
    2.75539, 2.75539, 2.75539, 2.95805;
    3.46924, 3.46924, 3.46924, 3.65923;
    4.18309, 4.18309, 4.18309, 4.36041;
    4.89693, 4.89693, 4.89693, 5.0616;
    5.61078, 5.61078, 5.61078, 5.76278;
    6.32463, 6.32463, 6.32463, 6.46396;
    7.03848, 7.03848, 7.03848, 7.16514;
    7.75232, 7.75232, 7.75232, 7.86632;
    8.46617, 8.46617, 8.46617, 8.5675;
    9.18002, 9.18002, 9.18002, 9.26868;
    9.89387, 9.89387, 9.89387, 9.96986;
    10.6077, 10.6077, 10.6077, 10.671;
    11.3216, 11.3216, 11.3216, 11.3722;
    12.0354, 12.0354, 12.0354, 12.0734;
    12.7493, 12.7493, 12.7493, 12.7746;
    13.4631, 13.4631, 13.4631, 13.4758;
    14.177, 14.177, 14.177, 14.177
] m
L_FlocBaffles = [
    1.2277, 1.2277, 1.2277, 1.2277;
    1.2277, 1.2277, 1.2277, 1.2277;
    1.2277, 1.2277, 1.2277, 1.2277;
    1.2277, 1.2277, 1.2277, 1.2277;
    1.2277, 1.2277, 1.2277, 1.2277;
    1.2277, 1.2277, 1.2277, 1.2277;
    1.2277, 1.2277, 1.2277, 1.2277;
    1.2277, 1.2277, 1.2277, 1.2277;
    1.2277, 1.2277, 1.2277, 1.2277;
    1.2277, 1.2277, 1.2277, 1.2277;
    1.2277, 1.2277, 1.2277, 1.2277;
    1.2277, 1.2277, 1.2277, 1.2277;
    1.2277, 1.2277, 1.2277, 1.2277;
    1.2277, 1.2277, 1.2277, 1.2277;
    1.2277, 1.2277, 1.2277, 1.2277;
    1.2277, 1.2277, 1.2277, 1.2277;
    1.2277, 1.2277, 1.2277, 1.2277;
    1.2277, 1.2277, 1.2277, 1.2277;
    1.2277, 1.2277, 1.2277, 1.2277;
    1.2277, 1.2277, 1.2277, 1.2277
] m
Z_FlocBaffles = [
    0, 0, 0, 0;
    0, 0, 0, 0;
    0, 0, 0, 0;
    0, 0, 0, 0;
    0, 0, 0, 0;
    0, 0, 0, 0;
    0, 0, 0, 0;
    0, 0, 0, 0;
    0, 0, 0, 0;
    0, 0, 0, 0;
    0, 0, 0, 0;
    0, 0, 0, 0;
    0, 0, 0, 0;
    0, 0, 0, 0;
    0, 0, 0, 0;
    0, 0, 0, 0;
    0, 0, 0, 0;
    0, 0, 0, 0;
    0, 0, 0, 0;
    0, 0, 0, 0
] m
N_FlocChannels = 4
L_FlocTank = 59.5632 m
HL_Floc = 25.4215 cm
HW_FlocStart = 2.1555 m
S_FlocBaffle = [61.3848; 61.3848; 61.3848; 60.1181] cm
B_FlocBaffle = [71.3848; 71.3848; 71.3848; 70.1181] cm
N_FlocChannelBaffles = [20; 20; 20; 20]
W_FlocPort = [0.613848; 0.613848; 0.613848; 0.613848] m
HL_FlocChannels = [6.28844; 6.28844; 6.28844; 6.55622] cm
L_FlocBaffleLower = 1.2277 m
L_FlocBaffleUpper = 1.2277 m
H_FlocPort = [2.2555; 2.2555; 2.2555; 2.2555] m
Ti_Floc = 17.379 min  # residence time of the flocculator
N_FlocBaffles = 80
# Rapid Mix Unit and Entrance Tank:
L_Et = 5 m
W_Et = 5 m
H_Et =  # error: This variable is undefined.  # Height of Entrance Tank Orifice
W_EtOrifice[30] =  # error
L_trueET[30] =  # error  # Length of Entrance Tank Orifice
Pi_EtFlow[30] =  # error: This value must be a vector.  # Ratio of the minimum flow divided by the maximum flow through the plant.
L_FlocEntryOrifice =  # error  # Length of orifice entering into flocculator from Rapid Mix Unit
W_FlocEntryOrifice =  # error  # Height of orifice entering into flocculator
ED_Diffusion =  # error  # Minimum Energy Dissipation needed
HL_FlocEntryOrifice =  # error  # Head loss caused by entering flocculation tank.
A_FlocEntry =  # error
A_EtOrifice =  # error
HW_EtTotal =  # error  # Total Height of water at beginning of rapid mix unit
HW_Channel2 =  # error  # Height of water at the back of the entrance tank channel (from channel bottom)
HW_EtChannel =  # error  # Height of Waterfall into flocculator
W_EtChannel =  # error  # Widt of entrance tank channel
Vol_Stock = 14400 L  # Volume of chemical stock tanks
ZW_ExitChannel =  # error  # Water Level at the end of the plant in the exit channel and exit channel box
HW_Sed = 1.90128 m
HW_FlocStart = 2.1555 m  # Water level at the beginning of the floc tank
HL_Floc = 25.4215 cm  # just for ref. the head loss throught the floc tank
HW_EtTotal =  # error  # Height of the water in the entrance channel
# Materials List:
N_Launders = 16
L_LaunderPipeTotal = 197.293 m
N_Valves = 16
N_LaunderCouplings = 16
N_ValveCouplings = 16
N_SedPlatesTotal = 5408
N_SedPlatesPerSheet = 7
N_SedPlateSheets = 773
# [reference: AutoCADMasterProgram.xmcd]
# AutoCAD References
AC_SedTank =  # error
AC_EntranceTank =  # error
AC_FlocTank =  # error
